OA := 90
AB := 120
a := 0, 0.1 .. 2*π*3
OH(x) := OA*cos(x)
AH(x) := OA*sin(x)
a = [
    0; 0.1; 0.2; 0.3; 0.4; 0.5; 0.6; 0.7; 0.8; 0.9
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]
HB(x) := sqrt(AB^2 - AH(x)^2)
B(x) := OH(x) + HB(x)
# [plot: B(a) (1) vs a (1)]
